# OpenSim document version 40000
Model WUShoulderModel:
  gravity: 0 -9.8 0
  defaults: Thelen2003Muscle default: max_isometric_force=546 optimal_fiber_length=0.0535 tendon_slack_length=0.078
      pennation_angle_at_optimal=0.1396263 [radians] max_contraction_velocity=10 default_activation=1
  Ground
  BodySet:
    Body thorax: mass=32.93751 [kg] mass_center=(0 -0.001938034 0) inertia=(2.428318 1.244215 2.357338 0 0 0)
        meshes=(thorax.vtp hat_spine.vtp)
      WrapCylinder SpineCyl: active=false xyz_body_rotation=(1.57 0 0) translation=(-0.06016469 0.08729874 0.01763611)
          quadrant=all radius=0.01688885 length=0.07752136
      WrapCylinder SpineCyl2: active=false xyz_body_rotation=(1.57 -1.2 0)
          translation=(-0.06016469 0.02915772 0.02325641) quadrant=all radius=0.01984783 length=0.186921
      WrapCylinder SpineCyl3: active=false xyz_body_rotation=(1.57 -0.21 0)
          translation=(-0.110195 -0.07276348 0.02325641) quadrant=all radius=0.02239821 length=0.1870996
      WrapCylinder SpineCyl_t1: active=false xyz_body_rotation=(1.57 -1.2 0)
          translation=(-0.06016469 0.0116282 0.02325641) quadrant=all radius=0.01984783 length=0.186921
      WrapEllipsoid Thorax: active=false xyz_body_rotation=(0.0434587 -0.331962 0.189892)
          translation=(-0.04951721 -0.1233559 0.0687033) quadrant=all dimensions=(0.1244224 0.1323755 0.08055995)
      WrapEllipsoid ThoraxSRA: active=false xyz_body_rotation=(0 -0.331962 0.139892)
          translation=(-0.04951721 -0.09040928 0.0629861) quadrant=all dimensions=(0.06241628 0.09753327 0.06545496)
      WrapEllipsoid ThoraxSRA2: active=false xyz_body_rotation=(0 -0.431962 0.139892)
          translation=(-0.03284043 -0.1136657 0.08236644) quadrant=all dimensions=(0.09217569 0.1072331 0.0670115)
      WrapEllipsoid ThoraxLAT: active=false xyz_body_rotation=(0 -0.431962 0.139892)
          translation=(-0.04310306 -0.1385694 0.0629861) quadrant=all dimensions=(0.09217569 0.1072331 0.0670115)
    Body clavicle: mass=0.3293751 mass_center=(-0.01627927 0.01087214 0.08444488) inertia=(0 0 0 0 0 0)
        meshes=clavicle.vtp
    Body scapula: mass=0.8234378 mass_center=(-0.07987043 -0.04196878 -0.06994796) inertia=(0 0 0 0 0 0)
        meshes=scapula.vtp
      WrapTorus INFSP: active=false xyz_body_rotation=(0.0253073 0.58835 0.151844)
          translation=(-0.06223238 -0.02141484 -0.01205257) quadrant=all inner_radius=0.008701316
          outer_radius=0.02066563
      WrapEllipsoid TMIN: active=false xyz_body_rotation=(-2.09754 -0.280823 -1.76348)
          translation=(-0.04636922 -0.05585076 -0.0386328) quadrant=x dimensions=(0.03231788 0.03317063 0.0539354)
      WrapCylinder TRIlongglen: active=false xyz_body_rotation=(1.37532 -0.294612 2.43596)
          translation=(-0.03982428 -0.03325219 -0.01420482) quadrant=x radius=0.003274321 length=0.03236881
    Body humerus: mass=3.347275 mass_center=(0 -0.1757887 0) inertia=(0.02246585 0.007750022 0.02521719 0 0 0)
        meshes=humerus.vtp
      WrapEllipsoid SUPSP: active=false xyz_body_rotation=(0.0380482 0.00855211 -1.30673)
          translation=(0.0002137223 0.008228307 0.004595028) quadrant=all dimensions=(0.02137223 0.02137223 0.02137223)
      WrapEllipsoid INFSP_and_TMIN_hum_head: active=false xyz_body_rotation=(-0.286583 -0.00907571 -0.0684169)
          translation=(-0.0003205834 0.002778389 0.004060723) quadrant=all
          dimensions=(0.02137223 0.02671528 0.02137223)
      WrapCylinder TMINhum: active=false xyz_body_rotation=(1.75353 0.0692896 2.74628)
          translation=(-0.001496056 -0.04862181 0) quadrant=x radius=0.007480279 length=0.07480279
      WrapSphere TMAJ_LAT_PEC_CORBhh: active=false translation=(0.0003205834 -0.009617501 0.006411668) quadrant=all
          radius=0.02618098
      WrapCylinder TMAJ_LAThum: active=false xyz_body_rotation=(1.53641 -0.0637045 1.41424)
          translation=(0.0007480279 -0.04733948 -0.005877362) quadrant=-x radius=0.007480279 length=0.04274445
      WrapEllipsoid PEC1hh: active=false xyz_body_rotation=(-0.620465 -0.310494 0.363727)
          translation=(-0.003953862 0.0005343056 -0.002671528) quadrant=all
          dimensions=(0.03205834 0.02137223 0.02137223)
      WrapCylinder PEC12hum: active=false xyz_body_rotation=(1.55928 -0.0774926 -0.925897)
          translation=(0.002137223 -0.05428545 -0.001816639) quadrant=x radius=0.009617501 length=0.07480279
      WrapSphere PEC23hh: active=false translation=(-0.009190057 0.002244084 -0.0004274445) quadrant=all
          radius=0.02137223
      WrapCylinder PEC3hum: active=false xyz_body_rotation=(1.44094 -0.0561996 1.75196)
          translation=(0.0009617501 -0.05888048 -0.0004274445) quadrant=-x radius=0.00854889 length=0.07480279
      WrapCylinder LAT_TMAJhh: active=false xyz_body_rotation=(-0.305084 -0.018326 -0.686613)
          translation=(-0.02393689 0.01089983 0.01004495) quadrant=-y radius=0.007480279 length=0.04808751
      WrapSphere LAT_TMAJ2hh: active=false xyz_body_rotation=(-0.127235 0.276111 0.0197222)
          translation=(-0.001709778 0.009831224 0.005556779) quadrant=-z radius=0.03205834
      WrapCylinder CORBhum: active=false xyz_body_rotation=(-1.60832 0.0959931 0.875283)
          translation=(0.00288525 -0.1284471 -0.006304806) quadrant=x radius=0.00854889 length=0.05343056
      WrapEllipsoid TRIlonghh: active=false xyz_body_rotation=(3.00162 -0.853466 2.57419)
          translation=(-0.008335168 -0.004381306 -0.001496056) quadrant=z dimensions=(0.03740139 0.02137223 0.02137223)
      WrapCylinder TRI: active=false xyz_body_rotation=(-0.14015 -0.00628319 0.154985)
          translation=(0.002992112 -0.3119276 -0.01271647) quadrant=all radius=0.01709778 length=0.04274445
      WrapEllipsoid ANC: active=false xyz_body_rotation=(0.00750492 -0.196699 1.04929)
          translation=(0.01431939 -0.3057297 -0.000854889) quadrant=-x dimensions=(0.02137223 0.02137223 0.02137223)
      WrapEllipsoid BIClong: active=false xyz_body_rotation=(-2.00434 -1.00164 0.975465)
          translation=(0.003526417 0.007800862 0.0003205834) quadrant=-y dimensions=(0.02671528 0.02137223 0.02137223)
      WrapEllipsoid Elbow_BIC_BRD: active=false xyz_body_rotation=(-0.128631 0.137532 0.0307178)
          translation=(0.002030361 -0.3088287 -0.01496056) quadrant=x dimensions=(0.01602917 0.01602917 0.1068611)
      WrapEllipsoid Elbow_PT_ECRL: active=false xyz_body_rotation=(-0.161094 -0.110828 0.61453)
          translation=(0.003205834 -0.3069052 -0.007373418) quadrant=x dimensions=(0.019235 0.02671528 0.03740139)
    Body ulna: mass=1.000477 mass_center=(0 -0.1181198 0) inertia=(0.004685298 0.0009775538 0.00508233 0 0 0)
        meshes=ulna.vtp
    Body radius: mass=1.000477 mass_center=(0 -0.1181198 0) inertia=(0.004685298 0.0009775538 0.00508233 0 0 0)
        meshes=radius.vtp
    Body hand_r: mass=0.7534456 mass_center=(0 -0.068095 0) inertia=(0.001469013 0.000900841 0.002206813 0 0 0)
        meshes=(pisiform.vtp scaphoid.vtp triquetrum.vtp hamate.vtp capitate.vtp trapezoid.vtp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)
      WrapTorus ECRL: xyz_body_rotation=(1.53833 0.234398 0.731118) translation=(0.0222 -0.0096 0.0208) quadrant=all
          inner_radius=0.008 outer_radius=0.016
      WrapTorus ECRB: xyz_body_rotation=(1.31266 -0.11781 -0.116239) translation=(0.0126 -0.0095 0.0186) quadrant=all
          inner_radius=0.008 outer_radius=0.01
      WrapTorus FCR: xyz_body_rotation=(-1.55596 -0.15324 -0.100007) translation=(0.0032 -0.0045 -0.019) quadrant=all
          inner_radius=0.001 outer_radius=0.0025
      WrapTorus FCU: xyz_body_rotation=(-1.57376 -0.0797616 0.39235) translation=(-0.0123 -0.0124 -0.0171) quadrant=all
          inner_radius=0.0068 outer_radius=0.008
  JointSet:
    CustomJoint ground_thorax: socket_parent_frame=ground_offset socket_child_frame=thorax_offset
      Coordinate thorax_tilt: default_value=0 range=(-1.5708 1.5708) clamped=false
      Coordinate thorax_list: default_value=0 range=(-1.5708 1.5708) clamped=false
      Coordinate thorax_rotation: default_value=0 range=(-1.5708 1.5708) clamped=false
      Coordinate thorax_tx: default_value=0 range=(-20 20) clamped=false
      Coordinate thorax_ty: default_value=0 range=(-2 4) clamped=false
      Coordinate thorax_tz: default_value=0 range=(-5 5) clamped=false
      PhysicalOffsetFrame ground_offset: socket_parent=/ground translation=(0 0 0) [meters]
      PhysicalOffsetFrame thorax_offset: socket_parent=/bodyset/thorax translation=(0 0 0)
      SpatialTransform:
        TransformAxis rotation1: coordinates=thorax_tilt axis=(0 0 1) LinearFunction(coefficients=1 0)
        TransformAxis rotation2: coordinates=thorax_list axis=(1 0 0) LinearFunction(coefficients=1 0)
        TransformAxis rotation3: coordinates=thorax_rotation axis=(0 1 0) LinearFunction(coefficients=1 0)
        TransformAxis translation1: coordinates=thorax_tx axis=(1 0 0)
            MultiplierFunction(scale=1, LinearFunction(coefficients=1 0))
        TransformAxis translation2: coordinates=thorax_ty axis=(0 1 0)
            MultiplierFunction(scale=1, LinearFunction(coefficients=1 0))
        TransformAxis translation3: coordinates=thorax_tz axis=(0 0 1)
            MultiplierFunction(scale=1, LinearFunction(coefficients=1 0))
    CustomJoint SCJ: socket_parent_frame=thorax_offset socket_child_frame=clavicle_offset
      Coordinate sternoclavicular_r1: default_value=0 range=(-1.570796 1.570796) clamped=false
      Coordinate sternoclavicular_r2: default_value=0 range=(-1.570796 1.570796) clamped=false
      Coordinate sternoclavicular_r3: default_value=0 range=(-1.570796 1.570796) clamped=false locked=true
      PhysicalOffsetFrame thorax_offset: socket_parent=/bodyset/thorax translation=(0.008113895 0.006715288 0.02467602)
      PhysicalOffsetFrame clavicle_offset: socket_parent=/bodyset/clavicle translation=(0 0 0)
      SpatialTransform: axes_held_at_zero=(translation1 translation2 translation3)
        TransformAxis rotation1: coordinates=sternoclavicular_r1 axis=(0.0153 0.9892987 -0.1451)
            LinearFunction(coefficients=1 0)
        TransformAxis rotation2: coordinates=sternoclavicular_r2 axis=(-0.9944725 0 -0.104997)
            LinearFunction(coefficients=1 0)
        TransformAxis rotation3: coordinates=sternoclavicular_r3 axis=(-0.103812 0.145416 0.9839092)
            LinearFunction(coefficients=1 0)
    CustomJoint ACJ: socket_parent_frame=clavicle_offset socket_child_frame=scapula_offset
      Coordinate Acromioclavicular_r1: default_value=0 range=(-1.570796 1.570796) clamped=false
      Coordinate Acromioclavicular_r2: default_value=0 range=(-1.570796 1.570796) clamped=false
      Coordinate Acromioclavicular_r3: default_value=0 range=(-1.570796 1.570796) clamped=false
      PhysicalOffsetFrame clavicle_offset: socket_parent=/bodyset/clavicle
          translation=(-0.01833905 0.02568491 0.1734532) orientation=(-0.52 0.52 0) [radians]
      PhysicalOffsetFrame scapula_offset: socket_parent=/bodyset/scapula translation=(0 0 0) orientation=(-0.52 0.52 0)
      SpatialTransform: axes_held_at_zero=(translation1 translation2 translation3)
        TransformAxis rotation1: coordinates=Acromioclavicular_r1 axis=(0 0 1) LinearFunction(coefficients=1 0)
        TransformAxis rotation2: coordinates=Acromioclavicular_r2 axis=(0 1 0) LinearFunction(coefficients=1 0)
        TransformAxis rotation3: coordinates=Acromioclavicular_r3 axis=(-1 0 0) LinearFunction(coefficients=1 0)
    CustomJoint GHJ: socket_parent_frame=scapula_offset socket_child_frame=humerus_offset
      Coordinate shoulder_plane: default_value=-1.5708 default_speed_value=5.342924e-15 range=(-1.9 0.35) clamped=true
      Coordinate shoulder_ele: default_value=0 range=(-0.3 3) clamped=true
      Coordinate shoulder_rotation: default_value=1.5708 default_speed_value=1.000209e-14 range=(0 3) clamped=true
      PhysicalOffsetFrame scapula_offset: socket_parent=/bodyset/scapula
          translation=(-0.01059392 -0.03658817 0.009685103)
      PhysicalOffsetFrame humerus_offset: socket_parent=/bodyset/humerus translation=(0 0 0)
      SpatialTransform: axes_held_at_zero=(translation1 translation2 translation3)
        TransformAxis rotation1: coordinates=shoulder_plane axis=(0.0001 1 0.0001) LinearFunction(coefficients=1 0)
        TransformAxis rotation2: coordinates=shoulder_ele axis=(0 0 1) LinearFunction(coefficients=1 0)
        TransformAxis rotation3: coordinates=shoulder_rotation axis=(0 1 0) LinearFunction(coefficients=1 0)
    CustomJoint elbow: socket_parent_frame=humerus_offset socket_child_frame=ulna_offset
      Coordinate elbow_flexion: default_value=0 range=(0 2.268928) clamped=true
      PhysicalOffsetFrame humerus_offset: socket_parent=/bodyset/humerus
          translation=(0.006518529 -0.3103247 -0.01314392)
      PhysicalOffsetFrame ulna_offset: socket_parent=/bodyset/ulna translation=(0 0 0)
      SpatialTransform: axes_held_at_zero=(rotation1 rotation2 translation1 translation2 translation3)
        TransformAxis rotation3: coordinates=elbow_flexion axis=(0.04940001 0.03660001 0.9981082)
            LinearFunction(coefficients=1 0)
    CustomJoint radioulnar: socket_parent_frame=ulna_offset socket_child_frame=radius_offset
      Coordinate pro_sup: default_value=0 range=(-1.570796 1.570796) clamped=true locked=true
      PhysicalOffsetFrame ulna_offset: socket_parent=/bodyset/ulna translation=(0.0003920177 -0.01127345 0.0195999)
      PhysicalOffsetFrame radius_offset: socket_parent=/bodyset/radius translation=(0 0 0)
      SpatialTransform: axes_held_at_zero=(rotation1 rotation3 translation1 translation2 translation3)
        TransformAxis rotation2: coordinates=pro_sup axis=(-0.01716099 0.9926656 -0.119668)
            LinearFunction(coefficients=1 0)
    WeldJoint radius_hand_r: socket_parent_frame=radius_offset socket_child_frame=hand_r_offset
      PhysicalOffsetFrame radius_offset: socket_parent=/bodyset/radius translation=(0.01677336 -0.2255082 0.02329634)
      PhysicalOffsetFrame hand_r_offset: socket_parent=/bodyset/hand_r translation=(0 0 0)
  ForceSet:
    Thelen2003Muscle LVS: max_isometric_force=169.9564 optimal_fiber_length=0.1690612 tendon_slack_length=0.005977594
        pennation_angle_at_optimal=0
      PathPoint DELT2-P2: thorax (-0.04780207 0.09151183 0.02184532)
      PathPoint DELT2-P3: scapula (-0.07504171 0.0007235159 -0.1029349)
    Thelen2003Muscle TRPSup: max_isometric_force=280.5671 optimal_fiber_length=0.1193519 tendon_slack_length=0.01787717
        pennation_angle_at_optimal=0
      PathPoint DELT2-P2: thorax (-0.07563574 0.0938491 0.001865135)
      PathPoint DELT2-P3: clavicle (-0.03915804 0.03179695 0.1257459)
    Thelen2003Muscle TRP2: max_isometric_force=162.45 optimal_fiber_length=0.1108245 tendon_slack_length=0.05561427
        pennation_angle_at_optimal=0
      PathPoint DELT2-P2: thorax (-0.09938347 0.03048314 0.003458548)
      PathPoint DELT2-P3: scapula (-0.04326315 -0.002778225 -0.01076123)
    Thelen2003Muscle TRPMed: max_isometric_force=155.2832 optimal_fiber_length=0.1056673 tendon_slack_length=0.02570573
        pennation_angle_at_optimal=0
      PathPoint DELT2-P2: thorax (-0.1182327 -0.01492761 0.002428376)
      PathPoint DELT2-P3: scapula (-0.06472167 -0.007005063 -0.04779673)
    Thelen2003Muscle TRPInf: max_isometric_force=557.2435 optimal_fiber_length=0.1500838
        tendon_slack_length=0.005852924 pennation_angle_at_optimal=0
      PathPoint DELT2-P2: thorax (-0.1487838 -0.1022933 0.0006624442)
      PathPoint DELT2-P3: scapula (-0.08784849 -0.01392922 -0.08490617)
      PathWrap: wrap_object=SpineCyl3 method=hybrid
    Thelen2003Muscle RMN: max_isometric_force=301.6171 optimal_fiber_length=0.1365595 tendon_slack_length=0.02924217
        pennation_angle_at_optimal=0
      PathPoint DELT2-P2: thorax (-0.08081824 0.05422784 0.002907051)
      PathPoint DELT2-P3: scapula (-0.08769884 -0.01415445 -0.107891)
      PathWrap: wrap_object=SpineCyl2
    Thelen2003Muscle RMJ1: max_isometric_force=185.9359 optimal_fiber_length=0.1223973 tendon_slack_length=0.03370272
        pennation_angle_at_optimal=0
      PathPoint DELT2-P2: thorax (-0.1014191 0.009147559 0.001389357)
      PathPoint DELT2-P3: scapula (-0.1002178 -0.04548167 -0.1121083)
      PathWrap: wrap_object=SpineCyl3
    Thelen2003Muscle RMJ2: max_isometric_force=111.5701 optimal_fiber_length=0.1147039 tendon_slack_length=0.0598375
        pennation_angle_at_optimal=0
      PathPoint DELT2-P2: thorax (-0.1116061 -0.02422542 0.001389357)
      PathPoint DELT2-P3: scapula (-0.1109312 -0.1065361 -0.1043839)
      PathWrap: wrap_object=SpineCyl3
    Thelen2003Muscle SRA1: max_isometric_force=365.1178 optimal_fiber_length=0.08274703 tendon_slack_length=0.06778387
        pennation_angle_at_optimal=0
      PathPoint DELT2-P2: thorax (-0.001282829 -0.0544261 0.1161066)
      PathPoint P3: thorax (-0.04361619 -0.0397297 0.116282)
      PathPoint P5: thorax (-0.08979805 -0.02810149 0.08914956)
      PathPoint DELT2-P3: scapula (-0.09745279 -0.05084302 -0.1060794)
      PathWrap: wrap_object=ThoraxSRA method=hybrid
    Thelen2003Muscle SRA2: max_isometric_force=179.9626 optimal_fiber_length=0.1200278 tendon_slack_length=0.0394593
        pennation_angle_at_optimal=0
      PathPoint DELT2-P2: thorax (-0.0008029523 -0.09885039 0.1335548)
      PathPoint P3: thorax (-0.06542429 -0.06976922 0.1191891)
      PathPoint P4: thorax (-0.09749502 -0.05232692 0.09883973)
      PathPoint DELT2-P3: scapula (-0.103277 -0.06703178 -0.1060178)
      PathWrap: wrap_object=ThoraxSRA method=hybrid
    Thelen2003Muscle SRA3: max_isometric_force=377.9217 optimal_fiber_length=0.1209666 tendon_slack_length=0.007957628
        pennation_angle_at_optimal=0
      PathPoint DELT2-P2: thorax (-0.01459013 -0.1568034 0.1442556)
      PathPoint P2: thorax (-0.07183844 -0.1104679 0.1250032)
      PathPoint P4: thorax (-0.1103233 -0.07558332 0.1065919)
      PathPoint DELT2-P3: scapula (-0.107474 -0.08331211 -0.1057209)
      PathWrap: wrap_object=ThoraxSRA2 method=hybrid
    Thelen2003Muscle SBCL: max_isometric_force=195.8076 optimal_fiber_length=0.03140653 tendon_slack_length=0.05726333
        pennation_angle_at_optimal=0
      PathPoint DELT2-P2: thorax (-0.001190289 -0.01279005 0.03791395)
      PathPoint DELT2-P3: clavicle (-0.02015338 0.01162727 0.09689023)
    Thelen2003Muscle PMN: max_isometric_force=218.7229 optimal_fiber_length=0.1562479 tendon_slack_length=0.006789276
        pennation_angle_at_optimal=0
      PathPoint P1: scapula (0.01331174 -0.04441158 -0.02853877)
      PathPoint P2: thorax (0.04162139 -0.07275205 0.08664766)
    Thelen2003Muscle DELTAnt: max_isometric_force=556.8 optimal_fiber_length=0.1951873 tendon_slack_length=0.0348708
        pennation_angle_at_optimal=0.3839724
      PathPoint DELT1-P1: humerus (0.004871916 -0.1110811 0.008287251)
      PathPoint DELT1-P3: clavicle (0.00835854 -0.01212952 0.1789494)
      PathPoint DELT1-P4: clavicle (-0.03093004 0.02467927 0.1267161)
    Thelen2003Muscle DELTMed: max_isometric_force=1098.4 optimal_fiber_length=0.1414841 tendon_slack_length=0.0501313
        pennation_angle_at_optimal=0.2617994
      PathPoint DELT2-P1: humerus (0.004871916 -0.1110811 0.008287251)
      PathPoint default: humerus (0.006086534 -0.05616771 0.02516998)
      PathPoint DELT2-P3: scapula (-0.008806934 -0.002218335 0.03907461)
      PathPoint DELT2-P3_0: scapula (-0.03053868 -0.00344596 0.001534917)
    Thelen2003Muscle DELTPost: max_isometric_force=944.7 optimal_fiber_length=0.1323358 tendon_slack_length=0.1050712
        pennation_angle_at_optimal=0.3141593
      PathPoint DELT3-P1: scapula (-0.06551871 -0.001688124 -0.04138832)
      PathPoint DELT3-P2: scapula (-0.06977419 -0.03245947 0.006432286)
      PathPoint DELT3-P2_0: humerus (-0.01985961 -0.05311212 0.01316559)
      PathPoint DELT3-P3: humerus (0.005343056 -0.1110811 0.008287251)
    Thelen2003Muscle SUPSP: max_isometric_force=410.7 optimal_fiber_length=0.1262612 tendon_slack_length=0.02687791
        pennation_angle_at_optimal=0.122173
      PathPoint P1: humerus (0.01523295 0.01800001 0.02238078)
      PathPoint P2: humerus (0.003810454 0.03337412 0.005896063)
      PathPoint P2_0: scapula (-0.06232079 -0.001438873 -0.04380228)
      PathPoint P3: scapula (-0.07436802 -0.01247172 -0.0694071)
      PathWrap: wrap_object=SUPSP method=hybrid
    Thelen2003Muscle INFSP: max_isometric_force=864.6 optimal_fiber_length=0.143693 tendon_slack_length=0.03660207
        pennation_angle_at_optimal=0.3228859
      PathPoint P1: humerus (-0.005447321 0.008592564 0.02820781)
      PathPoint P2: scapula (-0.04732756 -0.05217634 -0.02357236)
      PathPoint P3: scapula (-0.09760277 -0.0587055 -0.07463254)
      PathWrap: wrap_object=INFSP
      PathWrap pathwrap_0: wrap_object=INFSP_and_TMIN_hum_head method=hybrid
    Thelen2003Muscle SUBSC: max_isometric_force=944.3 optimal_fiber_length=0.1775563 tendon_slack_length=0.008159754
        pennation_angle_at_optimal=0.3490659
      PathPoint P1: humerus (0.02137169 -0.008882008 -0.001868713)
      PathPoint P2: humerus (0.00794131 0.01108641 -0.02424198)
      PathPoint default: scapula (-0.04338384 -0.03474584 -0.03591171)
      PathPoint P3: scapula (-0.07987043 -0.04196878 -0.06994796)
    Thelen2003Muscle bic_l: max_isometric_force=624.3 optimal_fiber_length=0.1748708 tendon_slack_length=0.2921189
        pennation_angle_at_optimal=0
      PathPoint P1: scapula (-0.03926319 -0.0286976 -0.01591596)
      PathPoint P2: humerus (0.01243265 0.03204124 -0.002884278)
      PathPoint P3: humerus (0.02383014 0.01982947 0.0004186851)
      PathPoint P4: humerus (0.03193662 2.326035e-5 0.0001744529)
      PathPoint P5: humerus (0.01443298 -0.04428763 -0.005210313)
      PathPoint P6: humerus (0.01343287 -0.09036626 -0.00276797)
      PathPoint P7: humerus (0.01980607 -0.141015 0.0002791245)
      PathPoint P8: humerus (0.02651695 -0.2039915 -0.007327008)
      PathPoint P9: humerus (0.0252032 -0.3144912 -0.01205361)
      PathPoint P10: radius (-0.002202934 -0.04130514 -0.002202934)
    Thelen2003Muscle bic_s: max_isometric_force=435.56 optimal_fiber_length=0.189909 tendon_slack_length=0.2057032
        pennation_angle_at_optimal=0
      PathPoint P1: scapula (0.01594169 -0.04794309 -0.03201497)
      PathPoint P2: humerus (0.01299079 -0.0881101 -0.01280474)
      PathPoint P3: humerus (0.01980607 -0.141015 -0.01254892)
      PathPoint P4: humerus (0.02651695 -0.2039915 -0.007327008)
      PathPoint P5: humerus (0.01972411 -0.3122995 -0.006574716)
      PathPoint P6: radius (-0.002202934 -0.04130514 -0.002202934)
    Thelen2003Muscle TMIN: max_isometric_force=605.4 optimal_fiber_length=0.04929402 tendon_slack_length=0.1129519
        pennation_angle_at_optimal=0.418879
      PathPoint P1: humerus (0.007006168 -0.003904887 0.02316546)
      PathPoint P1_0: humerus (-0.009058949 -0.01514949 0.02872951)
      PathPoint P2: scapula (-0.08321933 -0.05665871 -0.01104941)
      PathPoint P3: scapula (-0.09096399 -0.07261793 -0.04404634)
    Thelen2003Muscle TMAJ: max_isometric_force=234.9 optimal_fiber_length=0.15181 tendon_slack_length=0.0587334
        pennation_angle_at_optimal=0.2792527
      PathPoint P1: humerus (0.003952793 -0.04808751 -0.007227061)
      PathPoint default: scapula (-0.05030938 -0.1143014 -0.002659669)
      PathPoint P3: scapula (-0.1161549 -0.1159597 -0.07657204)
    Thelen2003Muscle PECM1: max_isometric_force=983.4 optimal_fiber_length=0.1228428 tendon_slack_length=0.05752637
        pennation_angle_at_optimal=0.296706
      PathPoint P1: humerus (0.01709778 -0.04327416 0.005343056)
      PathPoint P2: clavicle (0.008220296 -0.01201584 0.09976804)
      PathPoint P3: clavicle (0.00141468 0.007785255 0.06567928)
    Thelen2003Muscle PECM2: max_isometric_force=699.7 optimal_fiber_length=0.1750625 tendon_slack_length=0.1194177
        pennation_angle_at_optimal=0.4363323
      PathPoint P1: humerus (0.01709778 -0.0379311 0.005343056)
      PathPoint P2: thorax (0.05428574 -0.04212433 0.07830868)
      PathPoint P3: thorax (0.03189858 -0.04610893 0.01692524)
    Thelen2003Muscle PECM3: max_isometric_force=446.7 optimal_fiber_length=0.215022 tendon_slack_length=0.1171769
        pennation_angle_at_optimal=0.4363323
      PathPoint P1: humerus (0.01709778 -0.03205834 0.005343056)
      PathPoint P2: thorax (0.05550571 -0.09017769 0.08026658)
      PathPoint P2_0: thorax (0.08037477 -0.143181 0.02137671)
    Thelen2003Muscle tric_long: max_isometric_force=798.52 optimal_fiber_length=0.1761565 tendon_slack_length=0.1584341
        pennation_angle_at_optimal=0.2094
      PathPoint P1: scapula (-0.04924555 -0.06063929 -0.01447686)
      PathPoint P2: humerus (-0.02195761 -0.284194 -0.009746066)
      PathPoint P3: humerus (-0.02027134 -0.3111871 -0.01404925)
      PathPoint P4: ulna (-0.02159057 0.01031212 -0.000768978)
    Thelen2003Muscle tric_lat: max_isometric_force=624.3 optimal_fiber_length=0.09337038 tendon_slack_length=0.1100321
        pennation_angle_at_optimal=0.17
      PathPoint P1: humerus (-0.00696648 -0.1470751 0.004977709)
      PathPoint P2: humerus (-0.02840162 -0.2857872 -0.01222331)
      PathPoint P3: ulna (-0.02159057 0.01031212 -0.000768978)
    Thelen2003Muscle tric_med: max_isometric_force=624.3 optimal_fiber_length=0.09234558 tendon_slack_length=0.1009259
        pennation_angle_at_optimal=0.157
      PathPoint P1: humerus (-0.009746066 -0.1592744 -0.01053691)
      PathPoint P2: humerus (-0.03703048 -0.2632727 -0.01415397)
      PathPoint P3: humerus (-0.0318944 -0.2922498 -0.01404925)
      PathPoint P4: ulna (-0.02158731 -0.00600551 -0.000768978)
    Thelen2003Muscle LAT: max_isometric_force=1129.7 optimal_fiber_length=0.2615248 tendon_slack_length=0.08691157
        pennation_angle_at_optimal=0.3316126
      PathPoint LAT2-P1: humerus (0.01059797 -0.02386604 -0.009427289)
      PathPoint P2: humerus (0.002160016 -0.02018692 -0.02293785)
      PathPoint P3: thorax (-0.08054125 -0.07633211 0.1195883)
      PathPoint P4: thorax (-0.1169598 -0.09869636 0.1031219)
      PathPoint P4_0: thorax (-0.1335532 -0.132808 0.05390299)
      PathPoint LAT2-P2: thorax (-0.1214865 -0.1560098 0.0004962762)
      PathWrap: wrap_object=ThoraxLAT method=hybrid
    Thelen2003Muscle CORB: max_isometric_force=306.9 optimal_fiber_length=0.08901482 tendon_slack_length=0.06579821
        pennation_angle_at_optimal=0
      PathPoint P1: scapula (0.01386639 -0.04441158 -0.02853877)
      PathPoint P3: humerus (0 -0.1367822 -0.01245937)
      PathWrap: wrap_object=CORBhum
      PathWrap pathwrap_0: wrap_object=TMAJ_LAT_PEC_CORBhh
    ObjectGroup Scapulothoracic: members=(SBCL SRA1 SRA2 SRA3 LVS RMN RMJ1 RMJ2 PMN)
    ObjectGroup Glenohumeral: members=(INFSP LAT PECM1 PECM2 PECM3 SUBSC SUPSP TMAJ TMIN CORB)
  MarkerSet:
    Marker STER: thorax (0.02664672 -0.01513263 0.007837075)
    Marker XIPH: thorax (0.09675726 -0.163362 0.0005981854) fixed=true
    Marker C7: thorax (-0.1059741 0.06254482 0.01223403)
    Marker T10: thorax (-0.1300324 -0.19847 0.03026656)
    Marker EPICl: humerus (-0.007971825 -0.2917479 0.001066166)
    Marker EPICm: humerus (-0.001211972 -0.2847092 -0.07119028)
    Marker STYLr: radius (0.007914165 -0.2196707 -0.00109078)
    Marker STYLu: ulna (0.0427044 -0.2226481 0.06441935)
    Marker SCAP_IA: scapula (-0.1077651 -0.1376716 -0.08618946)
    Marker Acrom: scapula (-0.04832302 0.01029575 0.01412569)
    Marker SCAP_AA: scapula (-0.09713201 -0.009604925 -0.1129513)
    Marker LARM_elb: ulna (-0.02396808 -0.01024956 -0.0301311)
    Marker CLAV_SC: clavicle (0.01437402 -0.005372411 0.006797595)
    Marker CLAV_AC: clavicle (-0.01962663 0.05516617 0.1544828)
    Marker DELT: humerus (0.01687392 -0.1127864 0.02197824)
    Marker ARMl: humerus (0.01161375 -0.1616146 0.02031584)
