# OpenSim document version 40000
ScaleTool Wu_scaled:
  mass: 24 [kg]
  height: -1
  age: -1
  ModelScaler:
    apply: true
    scaling_order: measurements manualScale
    marker_file: anato.trc
    time_range: 0 1
    preserve_mass_distribution: false
    MeasurementSet:
      Measurement hum: apply=true
        MarkerPair: markers=(DELT EPICl)
        BodyScale humerus: axes=(X Y Z)
      Measurement larm: apply=true
        MarkerPair: markers=(EPICl STYLu)
        BodyScale ulna: axes=(X Y Z)
        BodyScale radius: axes=(X Y Z)
      Measurement thorax: apply=true
        MarkerPair: markers=(STER XIPH)
        BodyScale thorax: axes=(Y Z)
      Measurement clav: apply=true
        MarkerPair: markers=(CLAV_AC CLAV_SC)
        BodyScale clavicle: axes=(X Y Z)
      Measurement scapula_2: apply=true
        MarkerPair: markers=(SCAP_IA Acrom)
        BodyScale scapula: axes=(Y Z)
      Measurement scap_1: apply=true
        MarkerPair: markers=(Acrom SCAP_AA)
        BodyScale scapula: axes=X
      Measurement hum_x: apply=true
        MarkerPair: markers=(STER C7)
        BodyScale thorax: axes=X
    ScaleSet:
      Scale: scales=(1 1 1) segment=hand_r apply=true
  MarkerPlacer:
    apply: true
    marker_file: anato.trc
    coordinate_file: anato.mot
    time_range: 0 1
    max_marker_movement: -1
    IKTaskSet:
      IKMarkerTask STER: apply=true weight=100
      IKMarkerTask XIPH: apply=true weight=100
      IKMarkerTask C7: apply=true weight=0.1
      IKMarkerTask T10: apply=true weight=0.1
      IKMarkerTask EPICl: apply=true weight=1
      IKMarkerTask EPICm: apply=true weight=100
      IKMarkerTask STYLr: apply=true weight=100
      IKMarkerTask STYLu: apply=true weight=100
      IKMarkerTask SCAP_IA: apply=true weight=1
      IKMarkerTask Acrom: apply=true weight=100
      IKMarkerTask SCAP_AA: apply=true weight=1
      IKMarkerTask LARM_elb: apply=true weight=10
      IKMarkerTask CLAV_SC: apply=true weight=10
      IKMarkerTask CLAV_AC: apply=true weight=10
      IKMarkerTask DELT: apply=true weight=1
      IKMarkerTask ARMl: apply=true weight=0.1
      IKCoordinateTask [values shared by the 17 below unless stated]: apply=true value_type=from_file value=0
      IKCoordinateTask thorax_tilt: weight=0.1
      IKCoordinateTask thorax_list: weight=0.1
      IKCoordinateTask thorax_rotation: weight=0.1
      IKCoordinateTask thorax_tx: weight=0.1
      IKCoordinateTask thorax_ty: weight=0.1
      IKCoordinateTask thorax_tz: weight=0.1
      IKCoordinateTask sternoclavicular_r1: weight=1
      IKCoordinateTask sternoclavicular_r2: weight=1
      IKCoordinateTask sternoclavicular_r3: weight=0
      IKCoordinateTask Acromioclavicular_r1: weight=1
      IKCoordinateTask Acromioclavicular_r2: weight=1
      IKCoordinateTask Acromioclavicular_r3: weight=1
      IKCoordinateTask shoulder_plane: weight=1
      IKCoordinateTask shoulder_ele: weight=1
      IKCoordinateTask shoulder_rotation: weight=1
      IKCoordinateTask elbow_flexion: weight=1
      IKCoordinateTask pro_sup: weight=0
