# OpenSim document version 40000
ScaleTool arm26-scaled:
  mass: 3.6 [kg]
  height: 1
  age: -1
  GenericModelMaker:
    model_file: arm26_6mark.osim
  ModelScaler:
    apply: true
    scaling_order: measurements
    marker_file: marker_test.trc
    time_range: 0 2
    preserve_mass_distribution: true
    output_model_file: arm26_6mark_scaled.osim
    output_scale_file: scaled_file_scaling_factor.xml
    MeasurementSet:
      Measurement base: apply=true
        MarkerPair: markers=(acromion CLAVSC)
        BodyScale base: axes=(X Y Z)
      Measurement hum: apply=true
        MarkerPair: markers=(acromion EPICl)
        BodyScale r_humerus: axes=(X Y Z)
      Measurement larm: apply=true
        MarkerPair: markers=(EPICl STYLr)
        BodyScale r_ulna_radius_hand: axes=(X Y Z)
  MarkerPlacer:
    apply: true
    marker_file: marker_test.trc
    time_range: 0 2
    output_model_file: arm26_6mark_scaled_markers.osim
    max_marker_movement: -1
    IKTaskSet:
      IKMarkerTask acromion: apply=true weight=1
      IKMarkerTask CLAVSC: apply=true weight=1
      IKMarkerTask EPICl: apply=true weight=1
      IKMarkerTask EPICm: apply=true weight=1
      IKMarkerTask STYLr: apply=true weight=1
      IKMarkerTask STYLu: apply=true weight=1
      IKCoordinateTask r_elbow_flex: apply=false weight=1 value_type=default_value value=0
