# OpenSim document version 40000
ScaleTool WUShoulderModel-scaled:
  mass: 24.405 [kg]
  height: -1
  age: -1
  GenericModelMaker:
    model_file: /home/amedeo/Documents/programmation/code_paper_mhe/models/Wu_Shoulder_Model_mod_wt_wrapp.osim
    marker_set_file: /home/amedeo/Documents/programmation/code_paper_mhe/data/test_18_11_21/gregoire/test_1/Anato03.trc
  ModelScaler:
    apply: true
    scaling_order: measurements manualScale
    marker_file: /home/amedeo/Documents/programmation/code_paper_mhe/data/test_18_11_21/gregoire/test_1/Anato03.trc
    time_range: 0 1
    preserve_mass_distribution: true
    output_model_file: /home/amedeo/Documents/programmation/code_paper_mhe/models/Wu_Shoulder_Model_mod_wt_wrapp_wt_markers.osim
    MeasurementSet:
      Measurement thorax_z: apply=true
        MarkerPair: markers=(C7 T10)
        MarkerPair: markers=(STER XIPH)
        BodyScale thorax: axes=Z
      Measurement thorax_y: apply=true
        MarkerPair: markers=(STER C7)
        BodyScale thorax: axes=Y
      Measurement clav: apply=true
        MarkerPair: markers=(CLAV_SC CLAV_AC)
        BodyScale clavicle: axes=(X Y Z)
      Measurement scap_x: apply=true
        MarkerPair: markers=(Acrom SCAP_AA)
        BodyScale scapula: axes=X
      Measurement scapz: apply=true
        MarkerPair: markers=(SCAP_AA SCAP_IA)
        BodyScale scapula: axes=Z
      Measurement humz: apply=true
        MarkerPair: markers=(DELT EPICl)
        BodyScale humerus: axes=(Y Z)
      Measurement humx: apply=true
        MarkerPair: markers=(EPICl EPICm)
        BodyScale humerus: axes=X
      Measurement uln: apply=true
        MarkerPair: markers=(STYLu EPICl)
        BodyScale ulna: axes=(X Y Z)
      Measurement rad: apply=true
        MarkerPair: markers=(STYLr EPICm)
        BodyScale radius: axes=(X Y Z)
      Measurement thoraxx: apply=true
        MarkerPair: markers=(Acrom STER)
        BodyScale thorax: axes=X
      Measurement scapy: apply=true
        MarkerPair: markers=(Acrom SCAP_AA)
        BodyScale scapula: axes=Y
    ScaleSet:
      Scale: scales=(1 1 1) segment=hand_r apply=true
  MarkerPlacer:
    apply: true
    marker_file: /home/amedeo/Documents/programmation/code_paper_mhe/data/test_18_11_21/gregoire/test_1/Anato03.trc
    time_range: 0 1
    output_motion_file: motfile
    output_model_file: /home/amedeo/Documents/programmation/code_paper_mhe/models/Wu_Shoulder_Model_mod_wt_wrapp_scaled.osim
    output_marker_file: markout
    max_marker_movement: -1
    IKTaskSet:
      IKMarkerTask STER: apply=true weight=1
      IKMarkerTask XIPH: apply=true weight=1
      IKMarkerTask C7: apply=true weight=1
      IKMarkerTask T10: apply=true weight=1
      IKMarkerTask EPICl: apply=true weight=1
      IKMarkerTask EPICm: apply=true weight=1
      IKMarkerTask STYLr: apply=true weight=1
      IKMarkerTask STYLu: apply=true weight=1
      IKMarkerTask SCAP_IA: apply=true weight=1
      IKMarkerTask Acrom: apply=true weight=1
      IKMarkerTask SCAP_AA: apply=true weight=1
      IKMarkerTask LARM_elb: apply=true weight=1
      IKMarkerTask CLAV_SC: apply=true weight=1
      IKMarkerTask CLAV_AC: apply=true weight=1
      IKMarkerTask DELT: apply=true weight=1
      IKMarkerTask ARMl: apply=true weight=0.01
      IKCoordinateTask [values shared by the 7 below unless stated]: weight=10 value_type=default_value value=0
      IKCoordinateTask sternoclavicular_r1: apply=false
      IKCoordinateTask sternoclavicular_r2: apply=false
      IKCoordinateTask Acromioclavicular_r1: apply=false
      IKCoordinateTask Acromioclavicular_r2: apply=true
      IKCoordinateTask Acromioclavicular_r3: apply=true
      IKCoordinateTask elbow_flexion: apply=true
      IKCoordinateTask pro_sup: apply=true
